<?xml version="1.0" encoding="UTF-8"?>

<neuroml xmlns="http://www.neuroml.org/schema/neuroml2"
         xmlns:xsi="http://www.w3.org/2001/XMLSchema-instance"
         xsi:schemaLocation="http://www.neuroml.org/schema/neuroml2  https://raw.githubusercontent.com/NeuroML/NeuroML2/development/Schemas/NeuroML2/NeuroML_v2beta3.xsd"
         id="kChan">

    <ionChannelHH id="kChan" conductance="10pS" species="k">

        <notes>Single ion channel in NeuroML2 format: standard Potassium channel from the Hodgkin Huxley model</notes>

        <gateHHrates id="n" instances="4">
            <forwardRate type="HHExpLinearRate" rate="0.1per_ms" midpoint="-55mV" scale="10mV"/>
            <reverseRate type="HHExpRate" rate="0.125per_ms" midpoint="-65mV" scale="-80mV"/>
        </gateHHrates>

    </ionChannelHH>

</neuroml>
