<?xml version="1.0" encoding="UTF-8"?>

<neuroml xmlns="http://www.neuroml.org/schema/neuroml2"
         xmlns:xsi="http://www.w3.org/2001/XMLSchema-instance"
         xsi:schemaLocation="http://www.neuroml.org/schema/neuroml2  https://raw.githubusercontent.com/NeuroML/NeuroML2/development/Schemas/NeuroML2/NeuroML_v2beta3.xsd"
         id="passiveChan">

    <ionChannelHH id="passiveChan" conductance="10pS" type="ionChannelPassive">

        <notes>Single ion channel in NeuroML2 format: passive channel providing a leak conductance </notes>

    </ionChannelHH>

</neuroml>
